*Heading
** Job name: S-S-S Model name: S-S-S
** Generated by: Abaqus/CAE 2019
*Preprint, echo=NO, model=NO, history=NO, contact=NO
**
** PARTS
**
*Part, name=d1-15
*Node
      1,  -14.9812384,        -0.75,        30.75
      2,           0.,        -0.75,          45.
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*Element, type=S4
 1,  14,  15, 104,  95
 2,  15,  16, 105, 104
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*Nset, nset=_PickedSet2, internal, generate
   1,  321,    1
*Elset, elset=_PickedSet2, internal, generate
   1,  292,    1
** Section: thin02
*Shell Section, elset=_PickedSet2, material=PET, offset=SPOS
0.15, 5
*End Part
**
*Part, name=d2-15
*Node
      1,  -14.9812384,         0.75,        68.25
      2,           0.,         0.75,         82.5
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*Element, type=S4
 1,  14,  15, 104,  95
 2,  15,  16, 105, 104
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*Nset, nset=_PickedSet2, internal, generate
   1,  321,    1
*Elset, elset=_PickedSet2, internal, generate
   1,  292,    1
** Section: thin02
*Shell Section, elset=_PickedSet2, material=PET, offset=SPOS
0.15, 5
*End Part
**
*Part, name=d3-15
*Node
      1,  -14.9812384,        -0.75,       105.75
      2,           0.,        -0.75,         120.
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*Element, type=S4
 1,  14,  15, 104,  95
 2,  15,  16, 105, 104
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*Nset, nset=_PickedSet2, internal, generate
   1,  321,    1
*Elset, elset=_PickedSet2, internal, generate
   1,  292,    1
** Section: thin02
*Shell Section, elset=_PickedSet2, material=PET, offset=SPOS
0.15, 5
*End Part
**
*Part, name=f-RP-L
*Node
      1,         -15.,           0.,         150.
      2,         -15.,           0.,         148.
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*Element, type=R3D4
  1,   1,   2,  78,  77
  2,   2,   3,  79,  78
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*Node
    305,         -20., -1.39288099e-15,         150.
*Nset, nset=f-RP-L-RefPt_, internal
305,
*Elset, elset=f-RP-L, generate
   1,  225,    1
*End Part
**
*Part, name=f-RP-R
*Node
      1,          15.,           0.,         150.
      2,    16.666666,           0.,         150.
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*Element, type=R3D4
  1,   1,   2,   6,   5
  2,   2,   3,   7,   6
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*Node
    305,          20., -1.39288099e-15,         150.
*Nset, nset=f-RP-R-RefPt_, internal
305,
*Elset, elset=f-RP-R, generate
   1,  225,    1
*End Part
**
*Part, name=f-skin-bot
*Node
      1,           0.,         -15.,           0.
      2,           0.,         -15.,         150.
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*Element, type=S4
  1,    1,    7,  273,  176
  2,    7,    8,  274,  273
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*Nset, nset=_PickedSet5, internal, generate
    1,  1900,     1
*Elset, elset=_PickedSet5, internal, generate
    1,  1800,     1
** Section: thin015
*Shell Section, elset=_PickedSet5, material=PET, offset=SPOS
0.15, 5
*End Part
**
*Part, name=f-skin-top
*Node
      1,           0.,          15.,           0.
      2,           0.,          15.,         150.
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*Element, type=S4
  1,    1,    7,  273,  176
  2,    7,    8,  274,  273
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*Nset, nset=_PickedSet5, internal, generate
    1,  1900,     1
*Elset, elset=_PickedSet5, internal, generate
    1,  1800,     1
** Section: thin015
*Shell Section, elset=_PickedSet5, material=PET, offset=SNEG
0.15, 5
*End Part
**
**
** ASSEMBLY
**
*Assembly, name=Assembly
**
*Instance, name=f-RP-L-1, part=f-RP-L
*End Instance
**
*Instance, name=f-RP-R-1, part=f-RP-R
*End Instance
**
*Instance, name=f-skin-bot-1, part=f-skin-bot
*End Instance
**
*Instance, name=f-skin-top-1, part=f-skin-top
*End Instance
**
*Instance, name=d1-15-1, part=d1-15
*End Instance
**
*Instance, name=d2-15-1, part=d2-15
*End Instance
**
*Instance, name=d3-15-1, part=d3-15
*End Instance
**
*Nset, nset=ALL, instance=f-RP-L-1, generate
   1,  305,    1
*Nset, nset=ALL, instance=f-RP-R-1, generate
   1,  305,    1
*Nset, nset=ALL, instance=f-skin-bot-1, generate
    1,  1900,     1
*Nset, nset=ALL, instance=d2-15-1, generate
   1,  321,    1
*Nset, nset=ALL, instance=f-skin-top-1, generate
    1,  1900,     1
*Nset, nset=ALL, instance=d3-15-1, generate
   1,  321,    1
*Nset, nset=ALL, instance=d1-15-1, generate
   1,  321,    1
*Elset, elset=ALL, instance=f-RP-L-1, generate
   1,  225,    1
*Elset, elset=ALL, instance=f-RP-R-1, generate
   1,  225,    1
*Elset, elset=ALL, instance=f-skin-bot-1, generate
    1,  1800,     1
*Elset, elset=ALL, instance=d2-15-1, generate
   1,  292,    1
*Elset, elset=ALL, instance=f-skin-top-1, generate
    1,  1800,     1
*Elset, elset=ALL, instance=d3-15-1, generate
   1,  292,    1
*Elset, elset=ALL, instance=d1-15-1, generate
   1,  292,    1
*Nset, nset=RP-L, instance=f-RP-L-1
 305,
*Nset, nset=RP-R, instance=f-RP-R-1
 305,
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*Nset, nset=Set-26, instance=d2-15-1
  3,  5, 64, 65, 66, 67, 68, 69, 70, 71, 72, 73, 74, 75, 76
*Elset, elset=Set-26, instance=d2-15-1
 193, 195, 197, 199, 201, 202, 203, 204, 205, 206, 207, 208, 209, 210
*Nset, nset=crease-bot, instance=d1-15-1
  1,  4,  5, 35, 36, 37
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*Nset, nset=crease-bot, instance=d3-15-1
  1,  4,  5, 35, 36, 37
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*Nset, nset=crease-top, instance=d2-15-1
  1,  3,  5,  6,  7,  8
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*Elset, elset=crease-top, instance=d2-15-1
   1,   2,   3,   4,   5,  57
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*Nset, nset=dia-1, instance=d1-15-1, generate
   1,  321,    1
*Elset, elset=dia-1, instance=d1-15-1, generate
   1,  292,    1
*Nset, nset=dia-2, instance=d2-15-1, generate
   1,  321,    1
*Elset, elset=dia-2, instance=d2-15-1, generate
   1,  292,    1
*Nset, nset=dia-3, instance=d3-15-1, generate
   1,  321,    1
*Elset, elset=dia-3, instance=d3-15-1, generate
   1,  292,    1
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*Nset, nset=edge-RP-L, instance=f-RP-L-1, generate
  1,  76,   1
*Elset, elset=edge-RP-L, instance=f-RP-L-1, generate
  1,  75,   1
*Nset, nset=edge-RP-R, instance=f-RP-R-1, generate
   1,  301,    4
*Elset, elset=edge-RP-R, instance=f-RP-R-1, generate
   1,  223,    3
*Nset, nset=edge-skin-bot-L, instance=f-skin-bot-1
   5,   6, 188, 189, 190, 191
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*Elset, elset=edge-skin-bot-L, instance=f-skin-bot-1, generate
  912,  1800,    12
*Nset, nset=edge-skin-bot-R, instance=f-skin-bot-1
   3,   4,  92,  93,  94,  95
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*Elset, elset=edge-skin-bot-R, instance=f-skin-bot-1, generate
 826,  900,    1
*Nset, nset=edge-skin-top-L, instance=f-skin-top-1
   5,   6, 188, 189, 190, 191
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*Elset, elset=edge-skin-top-L, instance=f-skin-top-1, generate
  912,  1800,    12
*Nset, nset=edge-skin-top-R, instance=f-skin-top-1
   3,   4,  92,  93,  94,  95
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*Elset, elset=edge-skin-top-R, instance=f-skin-top-1, generate
 826,  900,    1
*Nset, nset=edges-skin-bot, instance=f-skin-bot-1
   3,   4,   5,   6,  92,  93
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*Elset, elset=edges-skin-bot, instance=f-skin-bot-1
  826,  827,  828,  829,  830,  831
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*Nset, nset=edges-skin-top, instance=f-skin-top-1
   3,   4,   5,   6,  92,  93
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*Elset, elset=edges-skin-top, instance=f-skin-top-1
  826,  827,  828,  829,  830,  831
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*Nset, nset=part-bot, instance=f-skin-bot-1, generate
    1,  1900,     1
*Nset, nset=part-bot, instance=d1-15-1, generate
   1,  321,    1
*Nset, nset=part-bot, instance=d3-15-1, generate
   1,  321,    1
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*Nset, nset=part-top, instance=f-skin-top-1, generate
    1,  1900,     1
*Nset, nset=part-top, instance=d2-15-1, generate
   1,  321,    1
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*Elset, elset=skin-bot, instance=f-skin-bot-1, generate
    1,  1800,     1
*Nset, nset=skin-top, instance=f-skin-top-1, generate
    1,  1900,     1
*Elset, elset=skin-top, instance=f-skin-top-1, generate
    1,  1800,     1
*Elset, elset=_d1-front_SPOS, internal, instance=d1-15-1, generate
   1,  292,    1
*Surface, type=ELEMENT, name=d1-front
_d1-front_SPOS, SPOS
*Elset, elset=_d2-front_SPOS, internal, instance=d2-15-1, generate
   1,  292,    1
*Surface, type=ELEMENT, name=d2-front
_d2-front_SPOS, SPOS
*Elset, elset=_d3-front_SPOS, internal, instance=d3-15-1, generate
   1,  292,    1
*Surface, type=ELEMENT, name=d3-front
_d3-front_SPOS, SPOS
*Elset, elset=_skin-bot-inner_SPOS, internal, instance=f-skin-bot-1, generate
    1,  1800,     1
*Surface, type=ELEMENT, name=skin-bot-inner
_skin-bot-inner_SPOS, SPOS
*Elset, elset=_skin-top-inner_SNEG, internal, instance=f-skin-top-1, generate
    1,  1800,     1
*Surface, type=ELEMENT, name=skin-top-inner
_skin-top-inner_SNEG, SNEG
*Surface, type=NODE, name=crease-bot_CNS_, internal
crease-bot, 1.
*Surface, type=NODE, name=crease-top_CNS_, internal
crease-top, 1.
*Surface, type=NODE, name=edge-RP-L_CNS_, internal
edge-RP-L, 1.
*Surface, type=NODE, name=edge-skin-bot-L_CNS_, internal
edge-skin-bot-L, 1.
*Surface, type=NODE, name=edge-RP-R_CNS_, internal
edge-RP-R, 1.
*Surface, type=NODE, name=edge-skin-bot-R_CNS_, internal
edge-skin-bot-R, 1.
*Surface, type=NODE, name=edge-skin-top-L_CNS_, internal
edge-skin-top-L, 1.
*Surface, type=NODE, name=edge-skin-top-R_CNS_, internal
edge-skin-top-R, 1.
*Rigid Body, ref node=f-RP-L-1.f-RP-L-RefPt_, elset=f-RP-L-1.f-RP-L
*Rigid Body, ref node=f-RP-R-1.f-RP-R-RefPt_, elset=f-RP-R-1.f-RP-R
** Constraint: Constraint-1
*Tie, name=Constraint-1, adjust=yes, no rotation
crease-bot_CNS_, skin-bot-inner
** Constraint: Constraint-2
*Tie, name=Constraint-2, adjust=yes, no rotation
crease-top_CNS_, skin-top-inner
** Constraint: Constraint-3
*Tie, name=Constraint-3, adjust=yes, no rotation
edge-skin-bot-L_CNS_, edge-RP-L_CNS_
** Constraint: Constraint-4
*Tie, name=Constraint-4, adjust=yes, no rotation
edge-skin-bot-R_CNS_, edge-RP-R_CNS_
** Constraint: Constraint-5
*Tie, name=Constraint-5, adjust=yes, no rotation
edge-skin-top-L_CNS_, edge-skin-bot-L_CNS_
** Constraint: Constraint-6
*Tie, name=Constraint-6, adjust=yes, no rotation
edge-skin-top-R_CNS_, edge-skin-bot-R_CNS_
** Constraint: Constraint-7
*Coupling, constraint name=Constraint-7, ref node=RP-L, surface=edge-skin-bot-L_CNS_
*Kinematic
1, 1
3, 3
4, 4
5, 5
** Constraint: Constraint-8
*Coupling, constraint name=Constraint-8, ref node=RP-L, surface=edge-skin-top-L_CNS_
*Kinematic
1, 1
3, 3
4, 4
5, 5
** Constraint: Constraint-9
*Coupling, constraint name=Constraint-9, ref node=RP-R, surface=edge-skin-bot-R_CNS_
*Kinematic
1, 1
3, 3
4, 4
5, 5
** Constraint: Constraint-10
*Coupling, constraint name=Constraint-10, ref node=RP-R, surface=edge-skin-top-R_CNS_
*Kinematic
1, 1
3, 3
4, 4
5, 5
*End Assembly
**
** MATERIALS
**
*Material, name=PET
*Density
 1.38e-06,
*Elastic
 2299.18, 0.37
**
** INTERACTION PROPERTIES
**
*Surface Interaction, name=IntProp-1
*Friction
 0.2,
*Surface Behavior, pressure-overclosure=HARD
**
** BOUNDARY CONDITIONS
**
** Name: BC-22 Type: Displacement/Rotation
*Boundary
crease-bot, 6, 6
** Name: BC-23 Type: Displacement/Rotation
*Boundary
crease-top, 6, 6
** ----------------------------------------------------------------
**
** STEP: Step-1
**
*Step, name=Step-1, nlgeom=YES
*Dynamic, Explicit
, 5.
*Bulk Viscosity
0.06, 1.2
**
** BOUNDARY CONDITIONS
**
** Name: BC-1 Type: Displacement/Rotation
*Boundary
ALL, 1, 1
ALL, 3, 3
ALL, 4, 4
ALL, 5, 5
ALL, 6, 6
** Name: BC-2 Type: Velocity/Angular velocity
*Boundary, type=VELOCITY
part-top, 2, 2, 1.
** Name: BC-3 Type: Velocity/Angular velocity
*Boundary, type=VELOCITY
part-bot, 2, 2, -1.
**
** OUTPUT REQUESTS
**
*Restart, write, number interval=1, time marks=NO
**
** FIELD OUTPUT: F-Output-1
**
*Output, field, variable=PRESELECT, number interval=200
**
** HISTORY OUTPUT: d1
**
*Output, history
*Energy Output, elset=dia-1
ALLSE,
**
** HISTORY OUTPUT: d2
**
*Energy Output, elset=dia-2
ALLSE,
**
** HISTORY OUTPUT: d3
**
*Energy Output, elset=dia-3
ALLSE,
**
** HISTORY OUTPUT: skin-bot
**
*Energy Output, elset=skin-bot
ALLSE,
**
** HISTORY OUTPUT: skin-top
**
*Energy Output, elset=skin-top
ALLSE,
**
** HISTORY OUTPUT: H-Output-1
**
*Output, history, variable=PRESELECT
*End Step
** ----------------------------------------------------------------
**
** STEP: Step-2
**
*Step, name=Step-2, nlgeom=YES
*Dynamic, Explicit
, 8.
*Bulk Viscosity
0.06, 1.2
**
** BOUNDARY CONDITIONS
**
** Name: BC-1 Type: Displacement/Rotation
*Boundary, op=NEW
** Name: BC-2 Type: Velocity/Angular velocity
*Boundary, op=NEW
** Name: BC-3 Type: Velocity/Angular velocity
*Boundary, op=NEW
** Name: BC-4 Type: Displacement/Rotation
*Boundary, op=NEW
RP-L, 2, 2
RP-L, 3, 3
RP-L, 4, 4
RP-L, 5, 5
RP-L, 6, 6
** Name: BC-5 Type: Displacement/Rotation
*Boundary, op=NEW
RP-R, 2, 2
RP-R, 3, 3
RP-R, 4, 4
RP-R, 5, 5
RP-R, 6, 6
** Name: BC-6 Type: Displacement/Rotation
*Boundary, op=NEW
edges-skin-bot, 2, 2
edges-skin-bot, 3, 3
edges-skin-bot, 4, 4
edges-skin-bot, 5, 5
** Name: BC-7 Type: Displacement/Rotation
*Boundary, op=NEW
edges-skin-top, 2, 2
edges-skin-top, 3, 3
edges-skin-top, 4, 4
edges-skin-top, 5, 5
** Name: BC-8 Type: Velocity/Angular velocity
*Boundary, op=NEW, type=VELOCITY
RP-L, 1, 1, -1.
** Name: BC-9 Type: Velocity/Angular velocity
*Boundary, op=NEW, type=VELOCITY
RP-R, 1, 1, 1.
** Name: BC-22 Type: Displacement/Rotation
*Boundary, op=NEW
crease-bot, 6, 6
** Name: BC-23 Type: Displacement/Rotation
*Boundary, op=NEW
crease-top, 6, 6
**
** OUTPUT REQUESTS
**
*Restart, write, number interval=1, time marks=NO
**
** FIELD OUTPUT: F-Output-1
**
*Output, field, variable=PRESELECT, number interval=200
**
** HISTORY OUTPUT: d1
**
*Output, history
*Energy Output, elset=dia-1
ALLSE,
**
** HISTORY OUTPUT: d2
**
*Energy Output, elset=dia-2
ALLSE,
**
** HISTORY OUTPUT: d3
**
*Energy Output, elset=dia-3
ALLSE,
**
** HISTORY OUTPUT: skin-bot
**
*Energy Output, elset=skin-bot
ALLSE,
**
** HISTORY OUTPUT: skin-top
**
*Energy Output, elset=skin-top
ALLSE,
**
** HISTORY OUTPUT: H-Output-1
**
*Output, history, variable=PRESELECT
*End Step
** ----------------------------------------------------------------
**
** STEP: Step-3
**
*Step, name=Step-3, nlgeom=YES
*Dynamic, Explicit
, 5.
*Bulk Viscosity
0.06, 1.2
**
** BOUNDARY CONDITIONS
**
** Name: BC-4 Type: Displacement/Rotation
*Boundary, op=NEW
** Name: BC-5 Type: Displacement/Rotation
*Boundary, op=NEW
** Name: BC-6 Type: Displacement/Rotation
*Boundary, op=NEW
** Name: BC-7 Type: Displacement/Rotation
*Boundary, op=NEW
** Name: BC-8 Type: Velocity/Angular velocity
*Boundary, op=NEW
** Name: BC-9 Type: Velocity/Angular velocity
*Boundary, op=NEW
** Name: BC-10 Type: Displacement/Rotation
*Boundary, op=NEW
RP-L, 1, 1
RP-L, 3, 3
RP-L, 4, 4
RP-L, 5, 5
RP-L, 6, 6
** Name: BC-11 Type: Displacement/Rotation
*Boundary, op=NEW
RP-R, 1, 1
RP-R, 3, 3
RP-R, 4, 4
RP-R, 5, 5
RP-R, 6, 6
** Name: BC-12 Type: Displacement/Rotation
*Boundary, op=NEW
edges-skin-bot, 1, 1
edges-skin-bot, 3, 3
edges-skin-bot, 4, 4
edges-skin-bot, 5, 5
** Name: BC-13 Type: Displacement/Rotation
*Boundary, op=NEW
edges-skin-top, 1, 1
edges-skin-top, 3, 3
edges-skin-top, 4, 4
edges-skin-top, 5, 5
** Name: BC-14 Type: Velocity/Angular velocity
*Boundary, op=NEW, type=VELOCITY
edges-skin-bot, 2, 2, 1.
** Name: BC-15 Type: Velocity/Angular velocity
*Boundary, op=NEW, type=VELOCITY
edges-skin-top, 2, 2, -1.
** Name: BC-22 Type: Displacement/Rotation
*Boundary, op=NEW
crease-bot, 6, 6
** Name: BC-23 Type: Displacement/Rotation
*Boundary, op=NEW
crease-top, 6, 6
**
** INTERACTIONS
**
** Interaction: Int-1
*Contact, op=NEW
*Contact Inclusions, ALL EXTERIOR
*Contact Property Assignment
 ,  , IntProp-1
**
** OUTPUT REQUESTS
**
*Restart, write, number interval=1, time marks=NO
**
** FIELD OUTPUT: F-Output-1
**
*Output, field, variable=PRESELECT, number interval=200
**
** HISTORY OUTPUT: d1
**
*Output, history
*Energy Output, elset=dia-1
ALLSE,
**
** HISTORY OUTPUT: d2
**
*Energy Output, elset=dia-2
ALLSE,
**
** HISTORY OUTPUT: d3
**
*Energy Output, elset=dia-3
ALLSE,
**
** HISTORY OUTPUT: skin-bot
**
*Energy Output, elset=skin-bot
ALLSE,
**
** HISTORY OUTPUT: skin-top
**
*Energy Output, elset=skin-top
ALLSE,
**
** HISTORY OUTPUT: H-Output-1
**
*Output, history, variable=PRESELECT
*End Step
** ----------------------------------------------------------------
**
** STEP: Step-4
**
*Step, name=Step-4, nlgeom=YES
*Dynamic, Explicit
, 16.
*Bulk Viscosity
0.06, 1.2
**
** BOUNDARY CONDITIONS
**
** Name: BC-10 Type: Displacement/Rotation
*Boundary, op=NEW
** Name: BC-11 Type: Displacement/Rotation
*Boundary, op=NEW
** Name: BC-12 Type: Displacement/Rotation
*Boundary, op=NEW
** Name: BC-13 Type: Displacement/Rotation
*Boundary, op=NEW
** Name: BC-14 Type: Velocity/Angular velocity
*Boundary, op=NEW
** Name: BC-15 Type: Velocity/Angular velocity
*Boundary, op=NEW
** Name: BC-16 Type: Displacement/Rotation
*Boundary, op=NEW
RP-L, 1, 1
RP-L, 2, 2
RP-L, 3, 3
RP-L, 4, 4
RP-L, 5, 5
RP-L, 6, 6
** Name: BC-17 Type: Displacement/Rotation
*Boundary, op=NEW
RP-R, 2, 2
RP-R, 3, 3
RP-R, 4, 4
RP-R, 5, 5
RP-R, 6, 6
** Name: BC-18 Type: Displacement/Rotation
*Boundary, op=NEW
edges-skin-bot, 2, 2
edges-skin-bot, 3, 3
edges-skin-bot, 4, 4
edges-skin-bot, 5, 5
** Name: BC-19 Type: Displacement/Rotation
*Boundary, op=NEW
edges-skin-top, 2, 2
edges-skin-top, 3, 3
edges-skin-top, 4, 4
edges-skin-top, 5, 5
** Name: BC-21 Type: Velocity/Angular velocity
*Boundary, op=NEW, type=VELOCITY
RP-R, 1, 1, -1.
** Name: BC-22 Type: Displacement/Rotation
*Boundary, op=NEW
** Name: BC-23 Type: Displacement/Rotation
*Boundary, op=NEW
** Name: BC-24 Type: Displacement/Rotation
*Boundary, op=NEW
Set-26, 6, 6
**
** OUTPUT REQUESTS
**
*Restart, write, number interval=1, time marks=NO
**
** FIELD OUTPUT: F-Output-1
**
*Output, field, variable=PRESELECT, number interval=200
**
** HISTORY OUTPUT: d1
**
*Output, history
*Energy Output, elset=dia-1
ALLSE,
**
** HISTORY OUTPUT: d2
**
*Energy Output, elset=dia-2
ALLSE,
**
** HISTORY OUTPUT: d3
**
*Energy Output, elset=dia-3
ALLSE,
**
** HISTORY OUTPUT: skin-bot
**
*Energy Output, elset=skin-bot
ALLSE,
**
** HISTORY OUTPUT: skin-top
**
*Energy Output, elset=skin-top
ALLSE,
**
** HISTORY OUTPUT: H-Output-1
**
*Output, history, variable=PRESELECT
*End Step
