*Heading
** Job name: S Model name: S
** Generated by: Abaqus/CAE 2019
*Preprint, echo=NO, model=NO, history=NO, contact=NO
**
** PARTS
**
*Part, name=dia
*Node
      1,  -14.9812384,        -0.75,       105.75
      2,           0.,        -0.75,         120.
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*Element, type=S4R
 1,  14,  15, 104,  95
 2,  15,  16, 105, 104
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*Nset, nset=_PickedSet2, internal, generate
   1,  321,    1
*Elset, elset=_PickedSet2, internal, generate
   1,  292,    1
** Section: thin015
*Shell Section, elset=_PickedSet2, material=PET, offset=SPOS
0.15, 5
*End Part
**
*Part, name=rigid-L
*Node
      1,         -15.,           0.,        80.75
      2,   -16.666666,           0.,        80.75
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*Element, type=R3D4
 1,   1,   2,   6,   5
 2,   2,   3,   7,   6
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*Node
    105,         -20., -1.39288099e-15,       130.75
*Nset, nset=rigid-L-RefPt_, internal
105,
*Elset, elset=rigid-L, generate
  1,  75,   1
*End Part
**
*Part, name=rigid-R
*Node
      1,          15.,           0.,        80.75
      2,          15.,           0.,        82.75
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*Element, type=R3D4
 1,   1,   2,  28,  27
 2,   2,   3,  29,  28
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*Node
    105,          20., -1.39288099e-15,       130.75
*Nset, nset=rigid-R-RefPt_, internal
105,
*Elset, elset=rigid-R, generate
  1,  75,   1
*End Part
**
*Part, name=skin-bot
*Node
      1,           0.,         -15.,       130.75
      2,          15.,           0.,       130.75
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*Element, type=S4R
  1,   1,   7, 123,  76
  2,   7,   8, 124, 123
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*Nset, nset=_PickedSet2, internal, generate
   1,  650,    1
*Elset, elset=_PickedSet2, internal, generate
   1,  600,    1
** Section: thin015
*Shell Section, elset=_PickedSet2, material=PET, offset=SPOS
0.15, 5
*End Part
**
*Part, name=skin-top
*Node
      1,           0.,          15.,       130.75
      2,          15.,           0.,       130.75
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*Element, type=S4R
  1,   1,   7, 123,  76
  2,   7,   8, 124, 123
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*Nset, nset=_PickedSet2, internal, generate
   1,  650,    1
*Elset, elset=_PickedSet2, internal, generate
   1,  600,    1
** Section: thin015
*Shell Section, elset=_PickedSet2, material=PET, offset=SNEG
0.15, 5
*End Part
**
**
** ASSEMBLY
**
*Assembly, name=Assembly
**
*Instance, name=dia-4, part=dia
*End Instance
**
*Instance, name=rigid-L-1, part=rigid-L
*End Instance
**
*Instance, name=rigid-R-1, part=rigid-R
*End Instance
**
*Instance, name=skin-bot-1, part=skin-bot
*End Instance
**
*Instance, name=skin-top-1, part=skin-top
*End Instance
**
*Nset, nset=ALL, instance=dia-4, generate
   1,  321,    1
*Nset, nset=ALL, instance=rigid-L-1, generate
   1,  105,    1
*Nset, nset=ALL, instance=rigid-R-1, generate
   1,  105,    1
*Nset, nset=ALL, instance=skin-top-1, generate
   1,  650,    1
*Nset, nset=ALL, instance=skin-bot-1, generate
   1,  650,    1
*Elset, elset=ALL, instance=dia-4, generate
   1,  292,    1
*Elset, elset=ALL, instance=rigid-L-1, generate
  1,  75,   1
*Elset, elset=ALL, instance=rigid-R-1, generate
  1,  75,   1
*Elset, elset=ALL, instance=skin-top-1, generate
   1,  600,    1
*Elset, elset=ALL, instance=skin-bot-1, generate
   1,  600,    1
*Nset, nset=RP-L, instance=rigid-L-1
 105,
*Nset, nset=RP-R, instance=rigid-R-1
 105,
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*Elset, elset=RP-srf-all, instance=rigid-L-1, generate
  1,  75,   1
*Elset, elset=RP-srf-all, instance=rigid-R-1, generate
  1,  75,   1
*Nset, nset=Set-26, instance=dia-4
  4,  5, 77, 78, 79, 80, 81, 82, 83, 84, 85, 86, 87, 88, 89
*Elset, elset=Set-26, instance=dia-4
 266, 268, 270, 272, 274, 276, 278, 280, 282, 283, 284, 285, 286, 287
*Nset, nset=crease-bot, instance=dia-4
  1,  4,  5, 35, 36, 37
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*Elset, elset=crease-bot, instance=dia-4
  75,  77,  79,  81,  83,  84
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*Nset, nset=dia-1, instance=dia-4, generate
   1,  321,    1
*Elset, elset=dia-1, instance=dia-4, generate
   1,  292,    1
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*Nset, nset=edge-RP-L, instance=rigid-L-1, generate
   1,  101,    4
*Elset, elset=edge-RP-L, instance=rigid-L-1, generate
  1,  73,   3
*Nset, nset=edge-RP-R, instance=rigid-R-1, generate
  1,  26,   1
*Elset, elset=edge-RP-R, instance=rigid-R-1, generate
  1,  25,   1
*Nset, nset=edge-skin-bot-L, instance=skin-bot-1
   5,   6,  99, 100, 101, 102
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*Elset, elset=edge-skin-bot-L, instance=skin-bot-1, generate
 301,  589,   12
*Nset, nset=edge-skin-bot-R, instance=skin-bot-1
  2,  3, 18, 19, 20, 21
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*Elset, elset=edge-skin-bot-R, instance=skin-bot-1, generate
  12,  300,   12
*Nset, nset=edge-skin-top-L, instance=skin-top-1
   5,   6,  99, 100, 101, 102
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*Elset, elset=edge-skin-top-L, instance=skin-top-1, generate
 301,  589,   12
*Nset, nset=edge-skin-top-R, instance=skin-top-1
  2,  3, 18, 19, 20, 21
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*Elset, elset=edge-skin-top-R, instance=skin-top-1, generate
  12,  300,   12
*Nset, nset=edges-skin-bot, instance=skin-bot-1
   2,   3,   5,   6,  18,  19
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*Elset, elset=edges-skin-bot, instance=skin-bot-1
  12,  24,  36,  48,  60,  72
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*Nset, nset=edges-skin-top, instance=skin-top-1
   2,   3,   5,   6,  18,  19
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*Elset, elset=edges-skin-top, instance=skin-top-1
  12,  24,  36,  48,  60,  72
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*Nset, nset=part-bot, instance=dia-4, generate
   1,  321,    1
*Nset, nset=part-bot, instance=skin-bot-1, generate
   1,  650,    1
*Elset, elset=part-bot, instance=dia-4, generate
   1,  292,    1
*Elset, elset=part-bot, instance=skin-bot-1, generate
   1,  600,    1
*Nset, nset=part-top, instance=skin-top-1, generate
   1,  650,    1
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*Nset, nset=skin-bot, instance=skin-bot-1, generate
   1,  650,    1
*Elset, elset=skin-bot, instance=skin-bot-1, generate
   1,  600,    1
*Nset, nset=skin-top, instance=skin-top-1, generate
   1,  650,    1
*Elset, elset=skin-top, instance=skin-top-1, generate
   1,  600,    1
*Elset, elset=_d1-front_SPOS, internal, instance=dia-4, generate
   1,  292,    1
*Surface, type=ELEMENT, name=d1-front
_d1-front_SPOS, SPOS
*Elset, elset=_skin-bot-inner_SPOS, internal, instance=skin-bot-1, generate
   1,  600,    1
*Surface, type=ELEMENT, name=skin-bot-inner
_skin-bot-inner_SPOS, SPOS
*Elset, elset=_skin-top-inner_SNEG, internal, instance=skin-top-1, generate
   1,  600,    1
*Surface, type=ELEMENT, name=skin-top-inner
_skin-top-inner_SNEG, SNEG
*Surface, type=NODE, name=crease-bot_CNS_, internal
crease-bot, 1.
*Surface, type=NODE, name=edge-RP-L_CNS_, internal
edge-RP-L, 1.
*Surface, type=NODE, name=edge-skin-bot-L_CNS_, internal
edge-skin-bot-L, 1.
*Surface, type=NODE, name=edge-RP-R_CNS_, internal
edge-RP-R, 1.
*Surface, type=NODE, name=edge-skin-bot-R_CNS_, internal
edge-skin-bot-R, 1.
*Surface, type=NODE, name=edge-skin-top-L_CNS_, internal
edge-skin-top-L, 1.
*Surface, type=NODE, name=edge-skin-top-R_CNS_, internal
edge-skin-top-R, 1.
*Rigid Body, ref node=rigid-L-1.rigid-L-RefPt_, elset=rigid-L-1.rigid-L
*Rigid Body, ref node=rigid-R-1.rigid-R-RefPt_, elset=rigid-R-1.rigid-R
** Constraint: Constraint-1
*Tie, name=Constraint-1, adjust=yes, no rotation
crease-bot_CNS_, skin-bot-inner
** Constraint: Constraint-3
*Tie, name=Constraint-3, adjust=yes, no rotation
edge-skin-bot-L_CNS_, edge-RP-L_CNS_
** Constraint: Constraint-4
*Tie, name=Constraint-4, adjust=yes, no rotation
edge-skin-bot-R_CNS_, edge-RP-R_CNS_
** Constraint: Constraint-5
*Tie, name=Constraint-5, adjust=yes, no rotation
edge-skin-top-L_CNS_, edge-skin-bot-L_CNS_
** Constraint: Constraint-6
*Tie, name=Constraint-6, adjust=yes, no rotation
edge-skin-top-R_CNS_, edge-skin-bot-R_CNS_
** Constraint: Constraint-7
*Coupling, constraint name=Constraint-7, ref node=RP-L, surface=edge-skin-bot-L_CNS_
*Kinematic
1, 1
3, 3
4, 4
5, 5
** Constraint: Constraint-8
*Coupling, constraint name=Constraint-8, ref node=RP-L, surface=edge-skin-top-L_CNS_
*Kinematic
1, 1
3, 3
4, 4
5, 5
** Constraint: Constraint-9
*Coupling, constraint name=Constraint-9, ref node=RP-R, surface=edge-skin-bot-R_CNS_
*Kinematic
1, 1
3, 3
4, 4
5, 5
** Constraint: Constraint-10
*Coupling, constraint name=Constraint-10, ref node=RP-R, surface=edge-skin-top-R_CNS_
*Kinematic
1, 1
3, 3
4, 4
5, 5
*End Assembly
**
** MATERIALS
**
*Material, name=PET
*Density
 1.38e-06,
*Elastic
 2299.18, 0.37
**
** INTERACTION PROPERTIES
**
*Surface Interaction, name=IntProp-1
*Friction
 0.2,
*Surface Behavior, pressure-overclosure=HARD
**
** BOUNDARY CONDITIONS
**
** Name: BC-22 Type: Displacement/Rotation
*Boundary
crease-bot, 6, 6
** ----------------------------------------------------------------
**
** STEP: Step-1
**
*Step, name=Step-1, nlgeom=YES
*Dynamic, Explicit
, 5.
*Bulk Viscosity
0.06, 1.2
**
** BOUNDARY CONDITIONS
**
** Name: BC-1 Type: Displacement/Rotation
*Boundary
ALL, 1, 1
ALL, 3, 3
ALL, 4, 4
ALL, 5, 5
ALL, 6, 6
** Name: BC-2 Type: Velocity/Angular velocity
*Boundary, type=VELOCITY
part-top, 2, 2, 1.
** Name: BC-3 Type: Velocity/Angular velocity
*Boundary, type=VELOCITY
part-bot, 2, 2, -1.
**
** OUTPUT REQUESTS
**
*Restart, write, number interval=1, time marks=NO
**
** FIELD OUTPUT: F-Output-1
**
*Output, field, variable=PRESELECT, number interval=200
**
** HISTORY OUTPUT: d1
**
*Output, history
*Energy Output, elset=dia-1
ALLSE,
**
** HISTORY OUTPUT: skin-bot
**
*Energy Output, elset=skin-bot
ALLSE,
**
** HISTORY OUTPUT: skin-top
**
*Energy Output, elset=skin-top
ALLSE,
**
** HISTORY OUTPUT: H-Output-1
**
*Output, history, variable=PRESELECT
*End Step
** ----------------------------------------------------------------
**
** STEP: Step-2
**
*Step, name=Step-2, nlgeom=YES
*Dynamic, Explicit
, 8.
*Bulk Viscosity
0.06, 1.2
**
** BOUNDARY CONDITIONS
**
** Name: BC-1 Type: Displacement/Rotation
*Boundary, op=NEW
** Name: BC-2 Type: Velocity/Angular velocity
*Boundary, op=NEW
** Name: BC-3 Type: Velocity/Angular velocity
*Boundary, op=NEW
** Name: BC-4 Type: Displacement/Rotation
*Boundary, op=NEW
RP-L, 2, 2
RP-L, 3, 3
RP-L, 4, 4
RP-L, 5, 5
RP-L, 6, 6
** Name: BC-5 Type: Displacement/Rotation
*Boundary, op=NEW
RP-R, 2, 2
RP-R, 3, 3
RP-R, 4, 4
RP-R, 5, 5
RP-R, 6, 6
** Name: BC-6 Type: Displacement/Rotation
*Boundary, op=NEW
edges-skin-bot, 2, 2
edges-skin-bot, 3, 3
edges-skin-bot, 4, 4
edges-skin-bot, 5, 5
** Name: BC-7 Type: Displacement/Rotation
*Boundary, op=NEW
edges-skin-top, 2, 2
edges-skin-top, 3, 3
edges-skin-top, 4, 4
edges-skin-top, 5, 5
** Name: BC-8 Type: Velocity/Angular velocity
*Boundary, op=NEW, type=VELOCITY
RP-L, 1, 1, -1.
** Name: BC-9 Type: Velocity/Angular velocity
*Boundary, op=NEW, type=VELOCITY
RP-R, 1, 1, 1.
** Name: BC-22 Type: Displacement/Rotation
*Boundary, op=NEW
crease-bot, 6, 6
**
** OUTPUT REQUESTS
**
*Restart, write, number interval=1, time marks=NO
**
** FIELD OUTPUT: F-Output-1
**
*Output, field, variable=PRESELECT, number interval=200
**
** HISTORY OUTPUT: d1
**
*Output, history
*Energy Output, elset=dia-1
ALLSE,
**
** HISTORY OUTPUT: skin-bot
**
*Energy Output, elset=skin-bot
ALLSE,
**
** HISTORY OUTPUT: skin-top
**
*Energy Output, elset=skin-top
ALLSE,
**
** HISTORY OUTPUT: H-Output-1
**
*Output, history, variable=PRESELECT
*End Step
** ----------------------------------------------------------------
**
** STEP: Step-3
**
*Step, name=Step-3, nlgeom=YES
*Dynamic, Explicit
, 5.
*Bulk Viscosity
0.06, 1.2
**
** BOUNDARY CONDITIONS
**
** Name: BC-4 Type: Displacement/Rotation
*Boundary, op=NEW
** Name: BC-5 Type: Displacement/Rotation
*Boundary, op=NEW
** Name: BC-6 Type: Displacement/Rotation
*Boundary, op=NEW
** Name: BC-7 Type: Displacement/Rotation
*Boundary, op=NEW
** Name: BC-8 Type: Velocity/Angular velocity
*Boundary, op=NEW
** Name: BC-9 Type: Velocity/Angular velocity
*Boundary, op=NEW
** Name: BC-10 Type: Displacement/Rotation
*Boundary, op=NEW
RP-L, 1, 1
RP-L, 3, 3
RP-L, 4, 4
RP-L, 5, 5
RP-L, 6, 6
** Name: BC-11 Type: Displacement/Rotation
*Boundary, op=NEW
RP-R, 1, 1
RP-R, 3, 3
RP-R, 4, 4
RP-R, 5, 5
RP-R, 6, 6
** Name: BC-12 Type: Displacement/Rotation
*Boundary, op=NEW
edges-skin-bot, 1, 1
edges-skin-bot, 3, 3
edges-skin-bot, 4, 4
edges-skin-bot, 5, 5
** Name: BC-13 Type: Displacement/Rotation
*Boundary, op=NEW
edges-skin-top, 1, 1
edges-skin-top, 3, 3
edges-skin-top, 4, 4
edges-skin-top, 5, 5
** Name: BC-14 Type: Velocity/Angular velocity
*Boundary, op=NEW, type=VELOCITY
edges-skin-bot, 2, 2, 1.
** Name: BC-15 Type: Velocity/Angular velocity
*Boundary, op=NEW, type=VELOCITY
edges-skin-top, 2, 2, -1.
** Name: BC-22 Type: Displacement/Rotation
*Boundary, op=NEW
crease-bot, 6, 6
**
** INTERACTIONS
**
** Interaction: Int-1
*Contact, op=NEW
*Contact Inclusions, ALL EXTERIOR
*Contact Property Assignment
 ,  , IntProp-1
**
** OUTPUT REQUESTS
**
*Restart, write, number interval=1, time marks=NO
**
** FIELD OUTPUT: F-Output-1
**
*Output, field, variable=PRESELECT, number interval=200
**
** HISTORY OUTPUT: d1
**
*Output, history
*Energy Output, elset=dia-1
ALLSE,
**
** HISTORY OUTPUT: skin-bot
**
*Energy Output, elset=skin-bot
ALLSE,
**
** HISTORY OUTPUT: skin-top
**
*Energy Output, elset=skin-top
ALLSE,
**
** HISTORY OUTPUT: H-Output-1
**
*Output, history, variable=PRESELECT
*End Step
** ----------------------------------------------------------------
**
** STEP: Step-4
**
*Step, name=Step-4, nlgeom=YES
*Dynamic, Explicit
, 16.
*Bulk Viscosity
0.06, 1.2
**
** BOUNDARY CONDITIONS
**
** Name: BC-10 Type: Displacement/Rotation
*Boundary, op=NEW
** Name: BC-11 Type: Displacement/Rotation
*Boundary, op=NEW
** Name: BC-12 Type: Displacement/Rotation
*Boundary, op=NEW
** Name: BC-13 Type: Displacement/Rotation
*Boundary, op=NEW
** Name: BC-14 Type: Velocity/Angular velocity
*Boundary, op=NEW
** Name: BC-15 Type: Velocity/Angular velocity
*Boundary, op=NEW
** Name: BC-16 Type: Displacement/Rotation
*Boundary, op=NEW
RP-L, 1, 1
RP-L, 2, 2
RP-L, 3, 3
RP-L, 4, 4
RP-L, 5, 5
RP-L, 6, 6
** Name: BC-17 Type: Displacement/Rotation
*Boundary, op=NEW
RP-R, 2, 2
RP-R, 3, 3
RP-R, 4, 4
RP-R, 5, 5
RP-R, 6, 6
** Name: BC-18 Type: Displacement/Rotation
*Boundary, op=NEW
edges-skin-bot, 2, 2
edges-skin-bot, 3, 3
edges-skin-bot, 4, 4
edges-skin-bot, 5, 5
** Name: BC-19 Type: Displacement/Rotation
*Boundary, op=NEW
edges-skin-top, 2, 2
edges-skin-top, 3, 3
edges-skin-top, 4, 4
edges-skin-top, 5, 5
** Name: BC-21 Type: Velocity/Angular velocity
*Boundary, op=NEW, type=VELOCITY
RP-R, 1, 1, -1.
** Name: BC-22 Type: Displacement/Rotation
*Boundary, op=NEW
** Name: BC-24 Type: Displacement/Rotation
*Boundary, op=NEW
Set-26, 6, 6
**
** OUTPUT REQUESTS
**
*Restart, write, number interval=1, time marks=NO
**
** FIELD OUTPUT: F-Output-1
**
*Output, field, variable=PRESELECT, number interval=200
**
** HISTORY OUTPUT: d1
**
*Output, history
*Energy Output, elset=dia-1
ALLSE,
**
** HISTORY OUTPUT: skin-bot
**
*Energy Output, elset=skin-bot
ALLSE,
**
** HISTORY OUTPUT: skin-top
**
*Energy Output, elset=skin-top
ALLSE,
**
** HISTORY OUTPUT: H-Output-1
**
*Output, history, variable=PRESELECT
*End Step
